// COMSOL Multiphysics 5.6.0.280 model "microstrip.mph"
// Outline of the model tree

Parameters
  eps0 = 1  // 真空相对介电常数
  eps1 = 10  // 介质相对介电常数

Geometry
  geom1 "几何 1" (2D, length unit m)
    r1: Rectangle "矩形 1" | base = center; size = {2, 2}
    r2: Rectangle "矩形 2" | pos = {0, -0.875}; base = center; size = {2, 0.25}
    r3: Rectangle "矩形 3" | pos = {0, -0.725}; base = center; size = {0.5, 0.05}
    dif1: Difference "求差 1" | input = r1; input2 = r3
    fin: Finalize "形成联合体"

Materials
  mat1: Common "材料 1" on domains 2
    def "基本"
      relpermittivity = eps0
  mat2: Common "材料 2" on domains 1
    def "基本"
      relpermittivity = eps1

Physics
  es: Electrostatics "静电" on all domains
    dependent variable V
    ccn1: ChargeConservation "电荷守恒 1" (default)
    zc1: ZeroCharge "零电荷 1" (default)
    init1: init "初始值 1" (default)
    pot1: ElectricPotential "电势 1" on boundaries 6-9 | V0 = 1
    gnd1: Ground "接地 1" on boundaries 1-3, 5, 11, 12

Mesh
  mesh1 "网格 1" (physics-controlled)

Studies
  std1 "研究 1"
    stat: Stationary "稳态"

Solver configurations
  sol1 "解 1" (study std1)
    v1: Variables "因变量 1"
    s1: Stationary "稳态求解器 1"
      dDef: Direct "直接"
      fc1: FullyCoupled "全耦合 1" | linsolver = dDef

Datasets
  dset1: Solution | solution = sol1

Plots
  pg1: PlotGroup2D "电势 (es)" | data = dset1
    surf1: Surface "表面 1" | expr = V
    con1: Contour "等值线 1" | expr = V